// SBML level 2 version 4

model Millard2016___E__coli_central_carbon_and_energy_metabolism()
  // Millard2016 - E. coli central carbon and energy metabolism
  // This model represents the central carbon and energy metabolic network of Escherichia coli growing under glucose limitation.

  // Compartments:
  compartment cell = 1; cell is "cell_cytoplasm";
  compartment extracellular = 65;
  compartment cell_periplasm = 0.2;

  // Species:
  species ACCOA in cell = 0.154743;
  species ACO in cell = 0.0321498;
  species ACP in cell = 0.01439093;
  species AKG in cell = 0.5978703;
  species BPG in cell = 0.06541057;
  species CIT in cell = 0.08953047;
  species DAP in cell = 0.4370941;
  species E4P in cell = 0.1312999;
  species F6P in cell = 0.2617665;
  species FDP in cell = 0.2818082;
  species FUM in cell = 0.213115;
  species G6P in cell = 0.8611295;
  species GAP in cell = 0.1171831;
  species GL6P in cell = 0.003261652;
  species GLX in cell = 0.00881041;
  species ICIT in cell = 0.1057824;
  species KDPG in cell = 0.08681769;
  species MAL in cell = 1.032153;
  species NAD in cell = 1.411544;
  species NADH in cell = 0.1584563;
  species NADP in cell = 0.1678372;
  species NADPH in cell = 0.08916279;
  species OAA in cell = 0.1278396;
  species PEP in cell = 0.9970383;
  species PGA2 in cell = 0.3782971;
  species PGA3 in cell = 0.6962742;
  species PGN in cell = 0.1315998;
  species PYR in cell = 0.2368914;
  species Q in cell = 0.3261174;
  species QH2 in cell = 0.6738826;
  species R5P in cell = 0.1068417;
  species RU5P in cell = 0.3418266;
  species S7P in cell = 0.1419851;
  species SUC in cell = 0.2160553;
  species SUCCOA in cell = 0.04108778;
  species X5P in cell = 0.506018;
  species ei in cell = 0.000334013;
  species eiP in cell = 0.006381163;
  species eiia in cell = 0.01420186;
  species eiiaP in cell = 0.4805685;
  species eiicb in cell = 4.719097e-5;
  species eiicbP in cell = 0.0003426214;
  species hpr in cell = 0.0001912118;
  species hprP in cell = 0.005250812;
  species icd in cell = 0.0005427438;
  species icdP in cell = 0.05145726;
  species tal in cell = 0.002780944;
  species talC3 in cell = 0.05721906;
  species tkt in cell = 0.01383078;
  species tktC2 in cell = 0.05616922;
  species ADP in cell = 0.5983147;
  species AMP in cell = 0.1862526;
  species ATP in cell = 2.572201;
  species CAMP in cell = 0.9231314;
  species $COA in cell = 0.5;
  species $HCO3 in cell = 1.4;
  species P in cell = 9.763948;
  species $MG in cell = 1;
  species $MgADP in cell;
  species $MgATP in cell;
  species $MgFDP in cell;
  species $ASP in cell = 1.17;
  species $CYS in cell = 0.085;
  species $MN in cell = 0.3;
  species $Hin in cell = 3.16227766e-5;
  species $H2O in cell = 1;
  species $O2 in cell = 0.21;
  species FAD in cell = 0.2539143;
  species FADH2 in cell = 0.7460857;
  species ACEx in cell = 0.0001867078;
  species GLCx in extracellular = 2;
  species $Px in extracellular = 10;
  species ACEx_0 in extracellular = 0.0001866871;
  species Hout in cell_periplasm = 5.374482e-5;
  species GLCp in cell_periplasm = 0.00403337;
  species Pp in cell_periplasm = 9.999428;
  species ACEp in cell_periplasm = 0.0001866974;

  // Parameters:
  Dil = 2.78e-5;
  FEED = 110.96;
  KdADPMg = 1.27771;
  KdATPMg = 0.0847634;
  KdFDPMg = 5.81;
  KmICIT_ACN = 9.31352;
  KmCIT_ACN = 0.0628882;
  KmACO_ACN = 0.02001;
  KeqNDH = 27.6193;

  // Assignment rules:
  MgADP := MG*ADP/(KdADPMg + MG);
  MgATP := MG*ATP/(KdATPMg + MG);
  MgFDP := MG*FDP/(KdFDPMg + MG);

  // Reactions:
  PGI: G6P -> F6P; cell*(PGI_Vmax*(G6P - F6P/PGI_Keq)/PGI_KmG6P/(1 + F6P/PGI_KmF6P + G6P/PGI_KmG6P + PEP/PGI_KmPEP + PGN/PGI_KmPGN));  // modifiers: PEP, PGN
    PGI_Keq = 0.36; PGI_KmF6P = 0.147; PGI_KmG6P = 0.28; PGI_KmPEP = 1.999; PGI_Vmax = 2.32456; PGI_KmPGN = 0.515958;
  PFK: ATP + F6P -> ADP + FDP; cell*(PFK_Vmax*PFK_n*(MgATP*F6P - MgADP*FDP/PFK_Keq)/(PFK_KirF6P*KmrATPMg)/(1 + PFK_KmrFDP/PFK_KirFDP*(MgADP/KmrADP) + KmrF6P/PFK_KirF6P*(MgATP/KmrATPMg) + PFK_KmrFDP/PFK_KirFDP*(MgADP/KmrADP)*(F6P/PFK_KirF6P) + MgATP/KmrATPMg*(F6P/PFK_KirF6P) + MgADP/PFK_KirADP*(MgATP/KmrATPMg)*(F6P/PFK_KirF6P) + (1 + (ATP - MgATP)/PFK_KirATP)*(F6P/PFK_KirF6P) + FDP/PFK_KirFDP + MgADP/KmrADP*(FDP/PFK_KirFDP) + KmrF6P/PFK_KirF6P*(MgATP/KmrATPMg)*(FDP/PFK_KirFDP) + Wr*(KmrF6P/PFK_KirF6P)*(MgADP/PFK_KirADP)*(MgATP/KmrATPMg)*(FDP/PFK_KmrFDP))/(1 + PFK_L0*((1 + PFK_KmtFDP/PFK_KitFDP*(MgADP/KmtADP) + KmtF6P/PFK_KitF6P*(MgATP/KmtATPMg) + PFK_KmtFDP/PFK_KitFDP*(MgADP/KmtADP)*(F6P/PFK_KitF6P) + MgATP/KmtATPMg*(F6P/PFK_KitF6P) + MgADP/PFK_KitADP*(MgATP/KmtATPMg)*(F6P/PFK_KitF6P) + (1 + (ATP - MgATP)/PFK_KitATP)*(F6P/PFK_KitF6P) + FDP/PFK_KitFDP + MgADP/KmtADP*(FDP/PFK_KitFDP) + KmtF6P/PFK_KitF6P*(MgATP/KmtATPMg)*(FDP/PFK_KitFDP) + Wt*(KmtF6P/PFK_KitF6P)*(MgADP/PFK_KitADP)*(MgATP/KmtATPMg)*(FDP/PFK_KmtFDP))*(1 + MgADP/KeftADP + PEP/KeftPEP + MgADP/KeftADP*(PEP/KeftPEP))/((1 + PFK_KmrFDP/PFK_KirFDP*(MgADP/KmrADP) + KmrF6P*MgATP/(PFK_KirF6P*KmrATPMg) + PFK_KmrFDP/PFK_KirFDP*(MgADP/KmrADP)*(F6P/PFK_KirF6P) + MgATP/KmrATPMg*(F6P/PFK_KirF6P) + MgADP/PFK_KirADP*(MgATP/KmrATPMg)*(F6P/PFK_KirF6P) + (1 + (ATP - MgATP)/PFK_KirATP)*(F6P/PFK_KirF6P) + FDP/PFK_KirFDP + MgADP/KmrADP*(FDP/PFK_KirFDP) + KmrF6P/PFK_KirF6P*(MgATP/KmrATPMg)*(FDP/PFK_KirFDP) + Wr*(KmrF6P/PFK_KirF6P)*(MgADP/PFK_KirADP)*(MgATP/KmrATPMg)*(FDP/PFK_KmrFDP))*(1 + MgADP/KefrADP + PEP/KefrPEP + MgADP/KefrADP*(PEP/KefrPEP))))^PFK_n));  // modifiers: PEP, MgADP, MgATP
    KefrADP = 0.0735264; KefrPEP = 19.98; KeftADP = 9.009; KeftPEP = 0.26026; PFK_Keq = 1998; PFK_KirADP = 54.945; PFK_KirATP = 2.4975e-5; PFK_KirF6P = 1.84615; PFK_KirFDP = 0.045954; PFK_KitADP = 80.08; PFK_KitATP = 0.014014; PFK_KitF6P = 0.00856856; PFK_KitFDP = 50.5505; KmrADP = 0.690009; KmrATPMg = 8.12187e-5; KmrF6P = 2.05205e-5; PFK_KmrFDP = 10.01; KmtADP = 2.002; KmtATPMg = 3.34334; KmtF6P = 32.967; PFK_KmtFDP = 9.99; PFK_L0 = 14.0851; PFK_Vmax = 0.185253; Wr = 0.0237041; Wt = 0.146735; PFK_n = 4;
  FBA: FDP -> DAP + GAP; cell*(FBA_Vmax*(FDP - DAP*GAP/FBA_Keq)/KmFDP/(1 + FDP/KmFDP + DAP/FBA_KmDAP + DAP/FBA_KmDAP*(GAP/FBA_KmGAP) + PEP/FBA_KmPEP));  // modifiers: PEP
    FBA_Keq = 0.18981; FBA_KmDAP = 0.13001; KmFDP = 0.12012; FBA_KmGAP = 0.13001; FBA_KmPEP = 0.5; FBA_Vmax = 21.6978;
  TPI: DAP -> GAP; cell*(TPI_Vmax*(DAP - GAP/TPI_Keq)/TPI_KmDAP/(1 + DAP/TPI_KmDAP + GAP/TPI_KmGAP));
    TPI_Keq = 0.270203; TPI_KmDAP = 0.01; TPI_KmGAP = 1.89301; TPI_Vmax = 24.1843;
  GDH: GAP + NAD + P -> BPG + NADH; cell*(GDH_Vmax*(P*GAP*NAD - BPG*NADH/GDH_Keq)/(GDH_KmP*GDH_KmGAP*GDH_KmNAD)/((1 + P/GDH_KmP)*(1 + GAP/GDH_KmGAP)*(1 + NAD/GDH_KmNAD) + (1 + BPG/GDH_KmBPG)*(1 + NADH/GDH_KmNADH) - 1));
    GDH_Keq = 20; GDH_KmBPG = 0.2; GDH_KmGAP = 2.47265; GDH_KmNAD = 0.0110454; GDH_KmNADH = 3.69797; GDH_KmP = 0.017; GDH_Vmax = 8.66573;
  PGK: ADP + BPG -> ATP + PGA3; cell*(PGK_Vmax*(MgADP*BPG - MgATP*PGA3/PGK_Keq)/(KmADPMg*PGK_KmBPG)/(1 + MgADP/KmADPMg + BPG/PGK_KmBPG + MgADP/KmADPMg*BPG/PGK_KmBPG + MgATP/PGK_KmATPMg + PGA3/PGK_KmPGA3 + MgATP/PGK_KmATPMg*PGA3/PGK_KmPGA3));  // modifiers: MgADP, MgATP
    PGK_Keq = 99.9925; KmADPMg = 0.085416; PGK_KmATPMg = 3.47737; PGK_KmBPG = 0.0113296; PGK_KmPGA3 = 2.45722; PGK_Vmax = 16.1089;
  GPM: PGA3 -> PGA2; cell*(GPM_Vmax*(PGA3 - PGA2/GPM_Keq)/GPM_KmPGA3/(1 + PGA3/GPM_KmPGA3 + PGA2/GPM_KmPGA2));
    GPM_Keq = 0.565818; GPM_KmPGA2 = 1.9153; GPM_KmPGA3 = 0.115; GPM_Vmax = 10.9934;
  ENO: PGA2 -> PEP; cell*(ENO_Vmax*(PGA2 - PEP/ENO_Keq)/ENO_KmPGA2/(1 + PGA2/ENO_KmPGA2 + PEP/ENO_KmPEP));
    ENO_Keq = 3; ENO_KmPEP = 0.1; ENO_KmPGA2 = 0.1; ENO_Vmax = 11.7189;
  PYK: ADP + PEP => ATP + PYR; cell*(PYK_Vmax*PYK_n*PEP*MgADP/(KirPEP*KmrADPMg)/(1 + PYK_KmrPEP/KirPEP*(MgADP/KmrADPMg) + MgATP/PYK_KirATP + MgADP/KmrADPMg*(PEP/KirPEP) + KmrADPMg/KmrADPMg*(1 + (ADP - MgADP)/PYK_KirADP)*(PEP/KirPEP) + PYR/KirPYR + MgATP/KirPyrATP*(PYR/KirPYR))/(1 + PYK_L0*((1 + PYK_KmtPEP/KitPEP*(MgADP/KmtADPMg) + MgATP/PYK_KitATP + MgADP*PEP/(KitPEP*KmtADPMg) + (1 + (ADP - MgADP)/PYK_KitADP)*(PEP/KitPEP) + PYR/KitPYR + MgATP/KitPyrATP*(PYR/KitPYR))*(1 + SUCCOA/KeftSUCCOA + MgATP*SUCCOA/(PYK_KeftATP*KeftSUCCOA))/((1 + PYK_KmrPEP/KirPEP*(MgADP/KmrADPMg) + MgATP/PYK_KirATP + MgADP/KmrADPMg*(PEP/KirPEP) + (1 + (ADP - MgADP)/PYK_KirADP)*(PEP/KirPEP) + PYR/KirPYR + MgATP/KirPyrATP*(PYR/KirPYR))*(1 + FDP/PYK_KefrFDP + G6P/KefrG6P + GL6P/KefrGL6P + R5P/KefrR5P + RU5P/KefrRU5P + S7P/KefrS7P + X5P/KefrX5P)))^PYK_n));  // modifiers: FDP, G6P, GL6P, MgADP, MgATP, R5P, RU5P, S7P, SUCCOA, X5P
    PYK_KefrFDP = 0.449149; KefrG6P = 0.158746; KefrGL6P = 0.150482; KefrR5P = 9.33254; KefrRU5P = 1.53591; KefrS7P = 0.0785955; KefrX5P = 0.677374; PYK_KeftATP = 3.69117; KeftSUCCOA = 8.26406; PYK_KirADP = 0.517585; PYK_KirATP = 96.0333; KirPEP = 0.181056; KirPYR = 15.1403; KirPyrATP = 230.781; PYK_KitADP = 0.224911; PYK_KitATP = 0.039564; KitPEP = 0.465672; KitPYR = 0.2499; KitPyrATP = 11.3691; KmrADPMg = 0.326144; PYK_KmrPEP = 5.56368e-7; KmtADPMg = 0.054678; PYK_KmtPEP = 0.11475; PYK_L0 = 50.4818; PYK_Vmax = 0.74716; PYK_n = 4;
  ZWF: G6P + NADP -> GL6P + NADPH; cell*(ZWF_Vmax*(G6P*NADP - GL6P*NADPH/ZWF_Keq)/(KdG6P*ZWF_KmNADP)/(1 + G6P/KdG6P + ZWF_KmG6P/KdG6P*(NADP/ZWF_KmNADP) + G6P/KdG6P*(NADP/ZWF_KmNADP) + ZWF_KmGL6P/KdGL6P*(NADPH/ZWF_KmNADPH) + GL6P/KdGL6P*(NADPH/ZWF_KmNADPH)));
    KdG6P = 0.192; KdGL6P = 0.02; ZWF_Keq = 60000000000; ZWF_KmG6P = 0.118525; ZWF_KmGL6P = 0.328629; ZWF_KmNADP = 0.0274; ZWF_KmNADPH = 0.0168; ZWF_Vmax = 0.2658;
  PGL: GL6P -> PGN; cell*(PGL_Vmax*(GL6P - PGN/PGL_Keq)/PGL_KmGL6P/(1 + GL6P/PGL_KmGL6P + PGN/PGL_KmPGN + G6P/KiG6P));  // modifiers: G6P
    PGL_Keq = 42.7572; KiG6P = 2.0001; PGL_KmGL6P = 0.022977; PGL_KmPGN = 9.99; PGL_Vmax = 11.5967;
  GND: NADP + PGN -> NADPH + RU5P + $HCO3; cell*(GND_Vmax*(NADP*PGN - NADPH*RU5P*HCO3/GND_Keq)/(KdNADP*GND_KmPGN)/(1 + NADP/KdNADP + FDP/KefFbP + NADP/KdNADP*(FDP/KefNADPFbP) + GND_KmNADP/KdNADP*(PGN/GND_KmPGN) + NADP/KdNADP*(PGN/GND_KmPGN) + ATP/GND_KefATP + ATP/KefNADPATP*(GND_KmNADP/KdNADP)*(PGN/GND_KmPGN) + HCO3/KdHCO3 + NADPH/KdNADPH + RU5P/KdRu5P + HCO3/KdHCO3*(NADPH/KdHCO3NADPH) + HCO3/KdHCO3*(GND_KmNADPH/KdHCO3NADPH)*(RU5P/GND_KmRU5P) + HCO3/KdHCO3*(NADPH/KdHCO3NADPH)*(RU5P/GND_KmRU5P) + GND_KmHCO3/KdHCO3*(NADPH/KdHCO3NADPH)*(RU5P/GND_KmRU5P)));  // modifiers: ATP, FDP
    KdHCO3 = 58.8951; KdHCO3NADPH = 9.7257; KdNADP = 0.116989; KdNADPH = 0.00340034; KdRu5P = 0.0440044; GND_KefATP = 0.0650065; KefFbP = 0.0129987; KefNADPATP = 0.139986; KefNADPFbP = 0.00519948; GND_Keq = 49.962; GND_KmHCO3 = 6.41899; GND_KmNADP = 0.049; GND_KmNADPH = 68.3828; GND_KmPGN = 0.093; GND_KmRU5P = 45.1977; GND_Vmax = 4.08105;
  RPE: RU5P -> X5P; cell*(RPE_Vmax*(RU5P - X5P/RPE_Keq)/RPE_KmRU5P/(1 + RU5P/RPE_KmRU5P + X5P/KmX5P));
    RPE_Keq = 1.5015; RPE_KmRU5P = 0.872522; KmX5P = 0.893607; RPE_Vmax = 6.00103;
  RPI: RU5P -> R5P; cell*(RPI_Vmax*(RU5P - R5P/RPI_Keq)/RPI_KmRU5P/(1 + RU5P/RPI_KmRU5P + R5P/RPI_KmR5P + E4P/RPI_KmE4P));  // modifiers: E4P
    RPI_Keq = 0.330093; RPI_KmE4P = 0.67067; RPI_KmR5P = 3.09715; RPI_KmRU5P = 4.40263; RPI_Vmax = 8;
  X5P_GAP_TKT: tkt + X5P -> GAP + tktC2; cell*X5P_GAP_TKT_kcat*(tkt*X5P - GAP*tktC2/X5P_GAP_TKT_Keq);
    X5P_GAP_TKT_Keq = 1.001; X5P_GAP_TKT_kcat = 40;
  F6P_E4P_TKT: E4P + tktC2 -> F6P + tkt; cell*F6P_E4P_TKT_kcat*(E4P*tktC2 - F6P*tkt/F6P_E4P_TKT_Keq);
    F6P_E4P_TKT_Keq = 0.5005; F6P_E4P_TKT_kcat = 40.0002;
  S7P_R5P_TKT: R5P + tktC2 -> S7P + tkt; cell*S7P_R5P_TKT_kcat*(R5P*tktC2 - S7P*tkt/S7P_R5P_TKT_Keq);
    S7P_R5P_TKT_Keq = 0.33033; S7P_R5P_TKT_kcat = 199.979;
  F6P_GAP_TAL: GAP + talC3 -> F6P + tal; cell*F6P_GAP_TAL_kcat*(GAP*talC3 - F6P*tal/F6P_GAP_TAL_Keq);
    F6P_GAP_TAL_Keq = 0.11011; F6P_GAP_TAL_kcat = 119.992;
  S7P_E4P_TAL: S7P + tal -> E4P + talC3; cell*S7P_E4P_TAL_kcat*(S7P*tal - E4P*talC3/S7P_E4P_TAL_Keq);
    S7P_E4P_TAL_Keq = 26.6266; S7P_E4P_TAL_kcat = 99.9991;
  FBP: FDP => F6P + P; cell*(FBP_Vmax*FBP_n*MgFDP/KirFDPMg/(1 + FBP_KmrFDP/FBP_KirFDP*(MG/FBP_KmrMg) + P/KirP + P/KirP*(MG/KirPMg) + F6P/FBP_KirF6P + F6P/FBP_KirF6P*(MG/KirF6PMg) + P/KirP*(F6P/KirPF6P) + P/KirP*(F6P/KirPF6P)*(MG/KirPF6PMg) + (FDP - MgFDP)/FBP_KirFDP + KdFDPMg/FBP_KmrMg*(MgFDP/FBP_KirFDP) + AMP/KirAMP + MgFDP/KirFDPMg + MgFDP/KirFDPMg*(MG/KirFDPMgMg) + AMP/KirAMP*((FDP - MgFDP)/KirAMPFDP))/(1 + FBP_L0*((1 + FBP_KmtFDP/FBP_KitFDP*(MG/FBP_KmtMg) + P/KitP + P/KitP*(MG/KitPMg) + F6P/FBP_KitF6P + F6P/FBP_KitF6P*(MG/KitF6PMg) + P/KitP*(F6P/KitPF6P) + P/KitP*(F6P/KitPF6P)*(MG/KitPF6PMg) + (FDP - MgFDP)/FBP_KitFDP + KdFDPMg/FBP_KmtMg*(MgFDP/FBP_KitFDP) + AMP/KitAMP + MgFDP/KitFDPMg + MgFDP/KitFDPMg*(MG/KitFDPMgMg) + AMP/KitAMP*((FDP - MgFDP)/KitAMPFDP))/(1 + FBP_KmrFDP/FBP_KirFDP*(MG/FBP_KmrMg) + P/KirP + P/KirP*(MG/KirPMg) + F6P/FBP_KirF6P + F6P/FBP_KirF6P*(MG/KirF6PMg) + P/KirP*(F6P/KirPF6P) + P/KirP*(F6P/KirPF6P)*(MG/KirPF6PMg) + (FDP - MgFDP)/FBP_KirFDP + KdFDPMg/FBP_KmrMg*(MgFDP/FBP_KirFDP) + AMP/KirAMP + MgFDP/KirFDPMg + MgFDP/KirFDPMg*(MG/KirFDPMgMg) + AMP/KirAMP*((FDP - MgFDP)/KirAMPFDP)))^FBP_n));  // modifiers: AMP, MG, MgFDP
    KirAMP = 0.00122122; KirAMPFDP = 0.256256; FBP_KirF6P = 1.12112; KirF6PMg = 0.384615; FBP_KirFDP = 1.35327; KirFDPMg = 0.75924; KirFDPMgMg = 0.356356; KirP = 3.16316; KirPF6P = 6.60538; KirPF6PMg = 48.4484; KirPMg = 0.856; KitAMP = 0.000255; KitAMPFDP = 690; FBP_KitF6P = 0.304; KitF6PMg = 315; FBP_KitFDP = 0.043101; KitFDPMg = 0.00642; KitFDPMgMg = 100; KitP = 0.642; KitPF6P = 0.00689; KitPF6PMg = 16.5; KitPMg = 539; FBP_KmrFDP = 0.0636141; FBP_KmrMg = 0.039039; FBP_KmtFDP = 1e-5; FBP_KmtMg = 55.055; FBP_L0 = 0.000815; FBP_Vmax = 0.215583; FBP_n = 4;
  PPC: PEP + $HCO3 -> OAA + P; cell*(PPC_Vmax*PPC_n*(PEP*HCO3 - OAA*P/PPC_Keq)/(KdrPEP*KmrHCO3)/(1 + PPC_KmrPEP/KdrPEP*(HCO3/KmrHCO3) + KmrOAA/KdrOAA*(P/KmrP) + OAA/KdrOAA + P/KmrP*(OAA/KdrOAA) + HCO3/KmrHCO3*(PEP/KdrPEP) + PEP/KdrPEP)/(1 + PPC_L0*((1 + ACCOA/PPC_KeftACCOA + FDP/KeftFDP + FDP/KeftFDP*(ACCOA/KeftFDPACCOA))*(1 + PPC_KmtPEP/KdtPEP*(HCO3/KmtHCO3) + KmtOAA/KdtOAA*(P/KmtP) + OAA/KdtOAA + P/KmtP*(OAA/KdtOAA) + HCO3/KmtHCO3*(PEP/KdtPEP) + PEP/KdtPEP)*(1 + ASP/PPC_KeftASP + CYS/KeftCYS + CIT/KeftCIT + FUM/KeftFUM + MAL/KeftMAL + SUC/KeftSUC)/((1 + ACCOA/PPC_KefrACCOA + FDP/PPC_KefrFDP + FDP/PPC_KefrFDP*(ACCOA/KefrFDPACCOA))*(1 + PPC_KmrPEP/KdrPEP*(HCO3/KmrHCO3) + KmrOAA/KdrOAA*(P/KmrP) + OAA/KdrOAA + P/KmrP*(OAA/KdrOAA) + HCO3/KmrHCO3*(PEP/KdrPEP) + PEP/KdrPEP)*(1 + ASP/PPC_KefrASP + CYS/KefrCYS + CIT/KefrCIT + FUM/KefrFUM + MAL/KefrMAL + SUC/KefrSUC)))^PPC_n));  // modifiers: ACCOA, CIT, FDP, FUM, MAL, SUC, ASP, CYS
    KdrOAA = 4.35404; KdrPEP = 655.591; KdtOAA = 17.9127; KdtPEP = 0.0121991; PPC_KefrACCOA = 0.140029; PPC_KefrASP = 0.389183; KefrCIT = 34.4277; KefrCYS = 0.000448843; PPC_KefrFDP = 9.99126; KefrFDPACCOA = 0.0156251; KefrFUM = 2.7475; KefrMAL = 0.23002; KefrSUC = 22.9834; PPC_KeftACCOA = 1.27598; PPC_KeftASP = 27.4729; KeftCIT = 0.521945; KeftCYS = 0.977374; KeftFDP = 13.2064; KeftFDPACCOA = 47.7563; KeftFUM = 9.76119; KeftMAL = 0.737283; KeftSUC = 107.18; PPC_Keq = 149.705; KmrHCO3 = 0.00219811; KmrOAA = 13.0469; KmrP = 0.663356; PPC_KmrPEP = 3.20089; KmtHCO3 = 0.00220031; KmtOAA = 6.80995; KmtP = 0.285131; PPC_KmtPEP = 5.12497; PPC_L0 = 6.37209e-6; PPC_Vmax = 21.439; PPC_n = 4.00319;
  PCK: ATP + OAA -> ADP + PEP + $HCO3; cell*(PCK_Vmax*(MgATP*OAA - HCO3*MgADP*PEP/PCK_Keq)/(PCK_KmATP*PCK_KmOAA)/(1 + HCO3/PCK_KmHCO3 + HCO3/PCK_KmHCO3*(ADP/PCK_KmADP) + MgADP/PCK_KmADP + MgATP/PCK_KmATP + OAA/PCK_KmOAA + MgATP/PCK_KmATP*(OAA/PCK_KmOAA) + HCO3/PCK_KmHCO3*(PEP/PCK_KmPEP) + PEP/PCK_KmPEP + HCO3/PCK_KmHCO3*(MgADP/PCK_KmADP)*(PEP/PCK_KmPEP) + MgADP/PCK_KmADP*(PEP/PCK_KmPEP)));  // modifiers: MgADP, MgATP
    PCK_Keq = 1.88166; PCK_KmADP = 0.04997; PCK_KmATP = 0.0600418; PCK_KmHCO3 = 2.6319; PCK_KmOAA = 0.66966; PCK_KmPEP = 0.0699833; PCK_Vmax = 8.08777;
  PPS: ATP + PYR -> AMP + PEP + P; cell*(PPS_Vmax*(MgATP*PYR - AMP*PEP*P*MG/PPS_Keq)/(PPS_KmATPMg*PPS_KmPYR)/(MgATP/PPS_KmATPMg + PPS_alpha*(P/KdP)*(MgATP/PPS_KmATPMg) + PPS_alpha*(AMP/KdAMP)*(MgATP/PPS_KmATPMg) + PPS_alpha*(P/KdP)*(AMP/KdAMP)*(MgATP/PPS_KmATPMg) + PPS_alpha*(MG/KdMg)*(P/PPS_KmP)*(AMP/KdAMP)*(MgATP/KdATPMgPPS)/(W*(1 + MG/KdMg)) + MgATP/PPS_KmATPMg*(AKG/KefAKG) + (1 + MG/KdMg)*(AKG/KefAKG)*(PEP/PPS_KmPEP)/W + MgATP/PPS_KmATPMg*(OAA/KefOAA) + (1 + MG/KdMg)*(OAA/KefOAA)*(PEP/PPS_KmPEP)/W + MG/KdMg*(P/PPS_KmP)*(AMP/KdAMP)/W + PPS_alpha*(P/KdP)*(AMP/KdAMP)*(PEP/PPS_KmPEP)/W + PPS_alpha*(MG/KdMg)*(P/PPS_KmP)*(AMP/KdAMP)*(PEP/PPS_KmPEP)/W + PPS_alpha*(1 + MG/KdMg)*(KmAMP/KdAMP*(P/PPS_KmP)*(PEP/PPS_KmPEP) + AMP/KdAMP*(PEP/PPS_KmPEP))/W + (1 + MG/KdMg)*(PYR/PPS_KmPYR) + MgATP/PPS_KmATPMg*(PYR/PPS_KmPYR) + KdADPMg/KdMg*(P/PPS_KmP)*(MgADP/KefADP)*(AMP/KdAMP)/(W*(1 + MG/KdMg)) + (ADP - MgADP)/KefADP*(PYR/PPS_KmPYR) + KdATPMg/KdMg*(P/PPS_KmP)*(AMP/KdAMP)*(MgATP/PPS_KefATP)/(W*(1 + MG/KdMg)) + (ATP - MgATP)/PPS_KefATP*(PYR/PPS_KmPYR) + (1 + MG/KdMg)*(PEP/PPS_KmPEP)/W + PPS_alpha*(1 + MG/KdMg)*(PEP/PPS_KdPEP)*(PYR/PPS_KmPYR) + (1 + MG/KdMg)*(PYR/KdPYR)*(PEP/PPS_KmPEP)/W));  // modifiers: ADP, AKG, OAA, MG, MgADP, MgATP
    KdAMP = 1480; KdATPMgPPS = 0.0549; KdMg = 36.9; KdP = 346; PPS_KdPEP = 95.7; KdPYR = 2740; KefADP = 0.0283; KefAKG = 0.274; PPS_KefATP = 0.000628; KefOAA = 0.796; PPS_Keq = 200000; KmAMP = 0.000384; PPS_KmATPMg = 0.0549; PPS_KmP = 84.4; PPS_KmPEP = 20.7; PPS_KmPYR = 0.229; PPS_Vmax = 0.0163772; W = 10; PPS_alpha = 38900;
  MAD: MAL + NAD => NADH + PYR + $HCO3; cell*(MAD_Vmax*MAD_n*MAL*NAD/(KmrMAL*KirNAD)/(1 + KmrNAD/KirNAD*(MAL/KmrMAL) + NAD/KirNAD + MAL/KmrMAL*(NAD/KirNAD))*((MG/MAD_KmrMg + MN/KmrMn)/(1 + MG/MAD_KmrMg + MN/KmrMn))/(1 + MAD_L0*((1 + ASP/MAD_KeftASP)*(1 + MG/MAD_KmtMg + MN/KmtMn)*(1 + ATP/MAD_KeftATP)*(1 + ACCOA/MAD_KeftACCOA + COA/KeftCOA)*(1 + KmtNAD/KitNAD*(MAL/KmtMAL) + NAD/KitNAD + MAL/KmtMAL*(NAD/KitNAD))/((1 + ASP/MAD_KefrASP)*(1 + MG/MAD_KmrMg + MN/KmrMn)*(1 + ATP/KefrATP)*(1 + ACCOA/MAD_KefrACCOA + COA/KefrCOA)*(1 + KmrNAD/KirNAD*(MAL/KmrMAL) + NAD/KirNAD + MAL/KmrMAL*(NAD/KirNAD))))^MAD_n)); MAD is "MAE";  // modifiers: ATP, ACCOA, COA, MG, ASP, MN
    MAD_KefrACCOA = 1.83336; MAD_KefrASP = 0.362142; KefrATP = 88.9752; KefrCOA = 0.268; MAD_KeftACCOA = 0.197; MAD_KeftASP = 0.583; MAD_KeftATP = 0.26; KeftCOA = 0.268; KirNAD = 0.636457; KitNAD = 0.990398; KmrMAL = 0.212913; MAD_KmrMg = 0.191871; KmrMn = 0.272568; KmrNAD = 1.36636; KmtMAL = 0.093; MAD_KmtMg = 2.37681; KmtMn = 0.410198; KmtNAD = 0.108; MAD_L0 = 19.9; MAD_Vmax = 6.64269; MAD_n = 4;
  PDH: $COA + NAD + PYR -> ACCOA + NADH + $HCO3; cell*(PDH_Vmax*(COA*NAD*PYR - ACCOA*NADH*HCO3/PDH_Keq)/(PDH_KmCOA*PDH_KmNAD*PDH_KmPYR)/(ACCOA/PDH_KmACCOA + NADH/PDH_KmNADH + ACCOA/PDH_KmACCOA*(NADH/PDH_KmNADH) + COA/PDH_KmCOA*(NADH/PDH_KmNADH) + ACCOA/PDH_KmACCOA*(COA/PDH_KmCOA)*(NADH/PDH_KmNADH) + NAD/PDH_KmNAD*(NADH/PDH_KmNADH) + COA/PDH_KmCOA*(NAD/PDH_KmNAD)*(NADH/PDH_KmNADH) + ACCOA/PDH_KmACCOA*(PYR/PDH_KmPYR) + ACCOA/PDH_KmACCOA*(COA/PDH_KmCOA)*(PYR/PDH_KmPYR) + COA/PDH_KmCOA*(1 + NAD/PDH_KmNAD)*(PYR/PDH_KmPYR) + NAD/PDH_KmNAD*(1 + COA/PDH_KmCOA + PYR/PDH_KmPYR))/(1 + HCO3/PDH_KmHCO3));
    PDH_Keq = 3138.16; PDH_KmACCOA = 10.174; PDH_KmCOA = 0.00500461; PDH_KmHCO3 = 0.00545112; PDH_KmNAD = 0.00999; PDH_KmNADH = 6.63512; PDH_KmPYR = 2; PDH_Vmax = 961.706;
  GLT: ACCOA + OAA -> CIT + $COA; cell*(GLT_Vmax*(ACCOA*OAA - CIT*COA/GLT_Keq)/(KdACCOA0*KmOAA0)/(ACCOA/KdACCOA0*(1 + AKG/Ki1AKG + NADH/Ki1NADH) + ACCOA/KdACCOA0*(OAA/KmOAA0)*(1 + AKG/Ki2AKG + NADH/Ki2NADH) + (1 + ATP/KiATP)*(1 + KmACCOA0/KdACCOA0*(OAA/KmOAA0)) + KmcsCOA/KdcsCOA*(CIT/KmcsCIT) + KmcsCOA/KdcsCOA*(ACCOA/KdACCOA0)*(CIT/KmcsCIT) + COA/KdcsCOA + CIT/KmcsCIT*(OAA/KmOAA0) + ACCOA/KdACCOA0*(CIT/KdcsCIT)*(OAA/KmOAA0) + KmACCOA0/KdACCOA0*(COA/KdcsCOA)*(OAA/KmOAA0) + CIT/KmcsCIT*(COA/KdcsCOA)*(OAA/KdcsOAA)));  // modifiers: ATP, AKG, NADH
    KdACCOA0 = 0.699309; KdcsCIT = 7.38128; KdcsCOA = 0.00174282; KdcsOAA = 0.154601; GLT_Keq = 83067.1; Ki1AKG = 0.0150083; Ki1NADH = 0.000330313; Ki2AKG = 0.256252; Ki2NADH = 0.0504; KiATP = 0.579939; KmACCOA0 = 0.119974; KmOAA0 = 0.00123458; KmcsCIT = 1.15715; KmcsCOA = 9.6344e-5; GLT_Vmax = 57.0584;
  ACN_1: CIT -> ACO; cell*(ACN_1_Vmax*(CIT - ACO/ACN_1_Keq)/KmCIT_ACN/(1 + CIT/KmCIT_ACN + ACO/KmACO_ACN + ICIT/KmICIT_ACN));  // modifiers: ICIT
    ACN_1_Keq = 0.384503; ACN_1_Vmax = 9.72413;
  ACN_2: ACO -> ICIT; cell*(ACN_2_Vmax*(ACO - ICIT/ACN_2_Keq)/KmACO_ACN/(1 + ACO/KmACO_ACN + ICIT/KmICIT_ACN + CIT/KmCIT_ACN));  // modifiers: CIT
    ACN_2_Keq = 3.49183; ACN_2_Vmax = 9.86571;
  ICD: ICIT + NADP -> AKG + NADPH + $HCO3; cell*(icd*ICD_kcat*(ICIT*NADP - AKG*NADPH/ICD_Keq)/(ICD_KmICIT*ICD_KmNADP)/((1 + ICIT/ICD_KmICIT)*(1 + NADP/ICD_KmNADP) + (1 + AKG/ICD_KmAKG)*(1 + NADPH/ICD_KmNADPH) - 1));  // modifiers: icd
    ICD_Keq = 28.1631; ICD_KmAKG = 0.038038; ICD_KmICIT = 0.010989; ICD_KmNADP = 0.005994; ICD_KmNADPH = 0.000683333; ICD_kcat = 2461.97;
  LPD: $COA + AKG + NAD => NADH + SUCCOA + $HCO3; cell*(LPD_Vmax*COA*AKG*NAD*(1 - AKG/KdAKG)/(LPD_KmCOA*LPD_KmAKG*LPD_KmNAD)/(COA/LPD_KmCOA*(AKG/LPD_KmAKG) + COA/LPD_KmCOA*(NAD/LPD_KmNAD) + AKG/LPD_KmAKG*(NAD/LPD_KmNAD) + COA/LPD_KmCOA*(AKG/LPD_KmAKG)*(NAD/LPD_KmNAD) - AKG/KdAKG*(COA/LPD_KmCOA*(AKG/LPD_KmAKG) + AKG/LPD_KmAKG*(NAD/LPD_KmNAD) + LPD_alpha*(COA/LPD_KmCOA)*(AKG/LPD_KmAKG)*(NAD/LPD_KmNAD))));
    KdAKG = 14.9386; LPD_KmAKG = 0.020002; LPD_KmCOA = 0.0760076; LPD_KmNAD = 0.0980098; LPD_Vmax = 0.0684413; LPD_alpha = 16.4304;
  SK: ADP + SUCCOA + P -> ATP + $COA + SUC; cell*(SK_Vmax*(ADP*SUCCOA*P - ATP*COA*SUC/SK_Keq)/(SK_KmADP*KmSUCCOA*SK_KmP)/((1 + ADP/SK_KmADP)*(1 + SUCCOA/KmSUCCOA)*(1 + P/SK_KmP) + (1 + ATP/SK_KmATP)*(1 + COA/SK_KmCOA)*(1 + SUC/SK_KmSUC) - 1));
    SK_Keq = 1.15994; SK_KmADP = 0.00868475; SK_KmATP = 0.102321; SK_KmCOA = 0.255019; SK_KmP = 0.914709; SK_KmSUC = 0.800744; KmSUCCOA = 0.0085; SK_Vmax = 76.8163;
  SDH: FAD + SUC -> FUM + FADH2; cell*(SDH_Vmax*(SUC*FAD - FUM*FADH2/SDH_Keq)/(KefSUC*SDH_KmQ)/(1 + FUM/KefFUM + SDH_KmSUC/KefSUC*(FAD/SDH_KmQ) + SDH_KmFUM/KefFUM*(FADH2/SDH_KmQH2) + FUM/KefFUM*(FADH2/SDH_KmQH2) + SUC/KefSUC + SUC/KefSUC*(FAD/SDH_KmQ)));
    KefFUM = 0.067048; KefSUC = 0.0322425; SDH_Keq = 2250; SDH_KmFUM = 1.36019; SDH_KmQ = 0.00160718; SDH_KmQH2 = 0.00611663; SDH_KmSUC = 0.805727; SDH_Vmax = 1.56184;
  FUMA: FUM -> MAL; cell*(FUMA_Vmax*(FUM - MAL/FUMA_Keq)/FUMA_KmFUM/(1 + FUM/FUMA_KmFUM + MAL/FUMA_KmMAL));
    FUMA_Keq = 4.99966; FUMA_KmFUM = 0.6; FUMA_KmMAL = 0.7; FUMA_Vmax = 53.3414;
  MQO: MAL + Q -> OAA + QH2; cell*(MQO_Vmax*(MAL*Q - OAA*QH2/MQO_Keq)/(MQO_KmMAL*MQO_KmQ)/((1 + MAL/MQO_KmMAL)*(1 + Q/MQO_KmQ) + (1 + OAA/MQO_KmOAA)*(1 + QH2/MQO_KmQH2) - 1));
    MQO_Keq = 9; MQO_KmMAL = 0.435; MQO_KmOAA = 75.8036; MQO_KmQ = 0.0414; MQO_KmQH2 = 8.77942; MQO_Vmax = 4.62283;
  MDH: QH2 + OAA -> MAL + Q; cell*(MDH_Vmax*(NADH*OAA - MAL*NAD/MDH_Keq)/(KiNADH*MDH_KmOAA)/(1 + MDH_KmNAD/KiNAD*(MAL/MDH_KmMAL) + NAD/KiNAD + MAL/MDH_KmMAL*(NAD/KiNAD) + NADH/KiNADH + MDH_KmNAD/KiNAD*(MAL/MDH_KmMAL)*(NADH/KiNADH) + MDH_KmNADH/KiNADH*(OAA/MDH_KmOAA) + MDH_KmNADH/KiNADH*(NAD/KiNAD)*(OAA/MDH_KmOAA) + MAL*NAD*OAA/(KiNAD*KiOAA*MDH_KmMAL) + NADH/KiNADH*(OAA/MDH_KmOAA) + MDH_Keq*(KiNADH*MDH_KmOAA/(KiNAD*MDH_KmMAL))*(MDH_KmNAD/KiNAD)*(MAL/MDH_KmMAL)*(NADH/MDH_KmNADH)*(OAA/KiOAA)));  // modifiers: NAD, NADH
    MDH_Keq = 100000; KiNAD = 0.0233122; KiNADH = 0.000196981; KiOAA = 2.46446; MDH_KmMAL = 0.86; MDH_KmNAD = 0.64; MDH_KmNADH = 0.003; MDH_KmOAA = 0.001; MDH_Vmax = 6.11492;
  ACEA: ICIT -> GLX + SUC; cell*(ACEA_Vmax*(ICIT - GLX*SUC/ACEA_Keq)/ACEA_KmICIT/(1 + ICIT/ACEA_KmICIT*(1 + PEP/KdPEPicit) + SUC/KdSUC*(1 + ICIT/KdICITsuc) + ACEA_KmSUC/KdSUC*(GLX/ACEA_KmGLX)*(1 + PEP/KdPEPglx) + GLX/ACEA_KmGLX*(SUC/KdSUC) + PEP/ACEA_KdPEP + PGA3/KdPGA3));  // modifiers: PEP, PGA3
    KdICITsuc = 0.00489074; ACEA_KdPEP = 1.05105; KdPEPglx = 0.0358555; KdPEPicit = 0.164263; KdPGA3 = 0.8; KdSUC = 0.53053; ACEA_Keq = 8.8088; ACEA_KmGLX = 0.13013; ACEA_KmICIT = 0.063063; ACEA_KmSUC = 0.58941; ACEA_Vmax = 1.52595;
  ACEB: ACCOA + GLX -> $COA + MAL; cell*(ACEB_Vmax*(ACCOA*GLX - COA*MAL/ACEB_Keq)/(ACEB_KmACCOA*ACEB_KmGLX)/((1 + ACCOA/ACEB_KmACCOA)*(1 + GLX/ACEB_KmGLX) + (1 + COA/ACEB_KmCOA)*(1 + MAL/ACEB_KmMAL) - 1));
    ACEB_Keq = 230000; ACEB_KmACCOA = 0.009; ACEB_KmCOA = 10.5652; ACEB_KmGLX = 0.021; ACEB_KmMAL = 15.0572; ACEB_Vmax = 0.352769;
  ACEK_1: ATP + icd -> ADP + icdP; cell*ACEK_1_k*(ATP*icd - ADP*icdP/ACEK_1_Keq);
    ACEK_1_Keq = 888; ACEK_1_k = 1.25457;
  ACEK_2: icdP -> icd + P; cell*ACEK_2_k*(icdP - icd*P/ACEK_2_Keq);
    ACEK_2_Keq = 400; ACEK_2_k = 0.0332;
  EDD: PGN -> KDPG; cell*(EDD_Vmax*(PGN - KDPG/EDD_Keq)/EDD_KmPGN/(1 + PGN/EDD_KmPGN + KDPG/EDD_KmKDPG));
    EDD_Keq = 1000; EDD_KmKDPG = 0.318316; EDD_KmPGN = 0.6; EDD_Vmax = 0.111359;
  EDA: KDPG -> GAP + PYR; cell*(EDA_Vmax*(KDPG - GAP*PYR/EDA_Keq)/EDA_KmKDPG/(1 + KDPG/EDA_KmKDPG + (1 + GAP/EDA_KmGAP)*(1 + PYR/EDA_KmPYR) - 1));
    EDA_Keq = 0.5; EDA_KmGAP = 86.678; EDA_KmKDPG = 0.06; EDA_KmPYR = 10; EDA_Vmax = 0.0775241;
  NADH_req: NADH + Q + 4 $Hin -> NAD + QH2 + 4 Hout; cell_periplasm*(NADH_req_Vmax/(1 + (ln(Hout/Hin)/ln(10))^2))*(NADH*Q - NAD*QH2/KeqNDH); NADH_req is "NDHI";
    NADH_req_Vmax = 23.0735;
  PNT_req: NAD + NADPH -> NADH + NADP; cell*PNT_req_k*(NAD*NADPH - NADH*NADP/PNT_req_Keq);
    PNT_req_Keq = 0.181891; PNT_req_k = 2.49441;
  ADK: AMP + ATP -> 2 ADP; cell*ADK_k*(AMP*ATP - ADP^2/ADK_Keq);
    ADK_Keq = 0.962758; ADK_k = 0.242256;
  ATP_syn: ADP + P + 4 Hout -> ATP + 4 $Hin; ATP_syn_Vmax*(ln(Hout/Hin)/ln(10))^4/(1 + (ln(Hout/Hin)/ln(10))^4)*(ADP*P - ATP/ATP_syn_Keq); ATP_syn is "ATP_SYN";
    ATP_syn_Vmax = 108.733; ATP_syn_Keq = 49.8315;
  CYA: ATP -> CAMP + 2 P; cell*(CYA_k*(ATP - CAMP*P^2/CYA_Keq)*eiiaP/(eiiaP + KaeiiaP));  // modifiers: eiiaP
    CYA_Keq = 2591.19; CYA_k = 0.00414418; KaeiiaP = 0.180981;
  DOS: CAMP -> AMP; cell*DOS_k*(CAMP - AMP/DOS_Keq);
    DOS_Keq = 674.242; DOS_k = 0.00828;
  ACK: ACP + ADP -> ACEx + ATP; cell*(cell*ACK_Vmax*(ACP*ADP - ACEx*ATP/ACK_Keq)/(ACK_KmACP*ACK_KmADP)/((1 + ACP/ACK_KmACP + ACEx/ACK_KmACE)*(1 + ADP/ACK_KmADP + ATP/ACK_KmATP)));
    ACK_Keq = 174; ACK_KmACE = 7; ACK_KmACP = 0.16; ACK_KmADP = 0.5; ACK_KmATP = 0.07; ACK_Vmax = 7.23;
  ACS: ACEx + ATP + $COA => ACCOA + AMP + 2 P; cell*(cell*ACS_Vmax*ACEx*ATP*COA/(ACS_KmACE*ACS_KmATP*ACS_KmCOA)/((1 + ACEx/ACS_KmACE)*(1 + ATP/ACS_KmATP)*(1 + COA/ACS_KmCOA)));
    ACS_KmACE = 0.07; ACS_KmATP = 0.1; ACS_KmCOA = 0.01; ACS_Vmax = 7.3;
  PTA: ACCOA + P -> $COA + ACP; cell*(PTA_Vmax*(ACCOA*P - ACP*COA/PTA_Keq)/(KiACCOA*PTA_KmP)/(1 + ACCOA/KiACCOA + P/KiP + ACP/KiACP + COA/KiCOA + ACCOA*P/(KiACCOA*PTA_KmP) + ACP*COA/(PTA_KmACP*KiCOA)));
    PTA_Keq = 0.0053952; KiACCOA = 0.2; KiACP = 0.2; KiCOA = 0.029; KiP = 13.54; PTA_KmACP = 0.7; PTA_KmP = 6.1; PTA_Vmax = 2.7;
  PTS_0: ei + PEP -> eiP + PYR; cell*(PTS_0_kF*ei*PEP^2/(PTS_0_KmPEP^2 + PEP^2) - PTS_0_kR*eiP*PYR^2/(PTS_0_KmPYR^2 + PYR^2));
    PTS_0_KmPEP = 0.6; PTS_0_KmPYR = 1; PTS_0_kF = 12000; PTS_0_kR = 8000;
  PTS_1: hpr + eiP -> hprP + ei; cell*(PTS_1_k1*hpr*eiP - PTS_1_k2*hprP*ei);
    PTS_1_k1 = 200000; PTS_1_k2 = 8000;
  PTS_2: eiia + hprP -> eiiaP + hpr; cell*(PTS_2_k1*eiia*hprP - PTS_2_k2*eiiaP*hpr);
    PTS_2_k1 = 61000; PTS_2_k2 = 47000;
  PTS_3: eiicb + eiiaP -> eiicbP + eiia; cell*(PTS_3_k1*eiicb*eiiaP - PTS_3_k2*eiicbP*eiia);
    PTS_3_k1 = 11000; PTS_3_k2 = 4000;
  PTS_4: GLCp + eiicbP -> G6P + eiicb; cell*(PTS_4_kF*eiicbP*GLCp/(KmGLC + GLCp) - PTS_4_kR*eiicb*G6P/(PTS_4_KmG6P + G6P));
    PTS_4_KmG6P = 2125.91; KmGLC = 0.02; PTS_4_kF = 4000; PTS_4_kR = 1e-5;
  GLC_feed: => GLCx; extracellular*Dil*(FEED - GLCx); GLC_feed is "_GLC_FEED";
  CYTBO: 2 QH2 + 8 $Hin + $O2 -> 2 Q + 8 Hout + 2 $H2O; CYTBO_Vmax/(1 + (ln(Hout/Hin)/ln(10))^2)*(QH2^2*O2 - Q^2/CYTBO_Keq);
    CYTBO_Vmax = 8.54045; CYTBO_Keq = 12.067;
  SQR: FADH2 + Q -> FAD + QH2; cell*SQR_Vmax*(FADH2*Q - FAD*QH2/SQR_Keq);
    SQR_Keq = 0.94033; SQR_Vmax = 3.41617;
  NDHII: NADH + Q -> NAD + QH2; cell*NDHII_Vmax*(NADH*Q - NAD*QH2/KeqNDH);
    NDHII_Vmax = 30.8306;
  GROWTH: 116 G6P + 204 E4P + 845 PGA3 + 1010 OAA + 610 AKG + 1601 PYR + 507 R5P + 293 PEP + 73 GAP + 40 F6P + 10169 NADPH + 2118 ACCOA + 2004 NAD + 30508 ATP => 10169 NADP + 2118 $COA + 2004 NADH + 30508 ADP + 30508 P; cell*(GROWTH_Vmax*G6P*E4P*PGA3*OAA*AKG*PYR*R5P*PEP*GAP*F6P*NADPH*ACCOA*NAD*ATP/(GROWTH_KmG6P*GROWTH_KmE4P*GROWTH_KmPGA3*GROWTH_KmOAA*GROWTH_KmAKG*GROWTH_KmPYR*GROWTH_KmR5P*GROWTH_KmPEP*GROWTH_KmGAP*GROWTH_KmF6P*GROWTH_KmNADPH*GROWTH_KmACCOA*GROWTH_KmNAD*GROWTH_KmATP)/((1 + G6P/GROWTH_KmG6P)*(1 + E4P/GROWTH_KmE4P)*(1 + PGA3/GROWTH_KmPGA3)*(1 + OAA/GROWTH_KmOAA)*(1 + AKG/GROWTH_KmAKG)*(1 + PYR/GROWTH_KmPYR)*(1 + R5P/GROWTH_KmR5P)*(1 + PEP/GROWTH_KmPEP)*(1 + GAP/GROWTH_KmGAP)*(1 + F6P/GROWTH_KmF6P)*(1 + NADPH/GROWTH_KmNADPH)*(1 + ACCOA/GROWTH_KmACCOA)*(1 + NAD/GROWTH_KmNAD)*(1 + ATP/GROWTH_KmATP)));
    GROWTH_Vmax = 9.74137; GROWTH_KmG6P = 1.20911; GROWTH_KmE4P = 1.63298; GROWTH_KmPGA3 = 0.0764619; GROWTH_KmOAA = 0.0248351; GROWTH_KmAKG = 5.11989; GROWTH_KmPYR = 0.00463904; GROWTH_KmR5P = 0.021234; GROWTH_KmPEP = 0.457734; GROWTH_KmGAP = 0.024854; GROWTH_KmF6P = 0.366423; GROWTH_KmNADPH = 3.59774; GROWTH_KmACCOA = 0.0494404; GROWTH_KmNAD = 2.82239; GROWTH_KmATP = 0.0468266;
  ATP_MAINTENANCE: ATP -> ADP + P; cell*ATP_MAINTENANCE_Vmax*(ATP - ADP*P/ATP_MAINTENANCE_Keq);
    ATP_MAINTENANCE_Vmax = 1.30166; ATP_MAINTENANCE_Keq = 3.63369;
  XCH_GLC: GLCx -> GLCp; extracellular*XCH_GLC_Vmax*(GLCx/XCH_GLC_Km - GLCp/XCH_GLC_Km)/(1 + GLCx/XCH_GLC_Km + GLCp/XCH_GLC_Km);
    XCH_GLC_Vmax = 100; XCH_GLC_Km = 10;
  PIT: Pp + Hout -> P + $Hin; PIT_Vmax*((ln(Hout/Hin)/ln(10))^2/(1 + (ln(Hout/Hin)/ln(10))^2)*(Pp/(KmPp + Pp)) - Kr/(1 + (ln(Hout/Hin)/ln(10))^2)*(P/(PIT_KmP + P)));
    PIT_Vmax = 7.146; KmPp = 0.025; Kr = 0.1; PIT_KmP = 12.18;
  XCH_P: $Px -> Pp; extracellular*XCH_P_Vmax*(Px/XCH_P_Km - Pp/XCH_P_Km)/(1 + Px/XCH_P_Km + Pp/XCH_P_Km);
    XCH_P_Vmax = 100; XCH_P_Km = 10;
  XCH_ACE1: ACEx -> ACEp; extracellular*XCH_ACE1_Vmax*(ACEx/XCH_ACE1_Km - ACEp/XCH_ACE1_Km)/(1 + ACEx/XCH_ACE1_Km + ACEp/XCH_ACE1_Km);
    XCH_ACE1_Vmax = 100; XCH_ACE1_Km = 10;
  _ACE_OUT: ACEx_0 => ; Dil*extracellular*ACEx_0;
    _ACE_OUT_k1 = 5.556e-5;
  XCH_ACE2: ACEp -> ACEx_0; extracellular*XCH_ACE2_Vmax*(ACEp/XCH_ACE2_Km - ACEx_0/XCH_ACE2_Km)/(1 + ACEp/XCH_ACE2_Km + ACEx_0/XCH_ACE2_Km);
    XCH_ACE2_Vmax = 100; XCH_ACE2_Km = 10;
  GL6P_HYDROLYSIS: GL6P -> PGN; cell*KGl6Phydrol*(GL6P - PGN/KeqGl6Phydrol);
    KGl6Phydrol = 0.000167; KeqGl6Phydrol = 42.8;

  // Unit definitions:
  unit substance = 1e-3 mole;
end
